FromBase10(Base10, Encoding) :=
    if IsString(Base10)
        Base10 ← str2num(Base10)
    Base ← strlen(Encoding)
    BaseX ← ""
    while Base10 ≥ 0
        if Base10 == 0
            if strlen(BaseX) == 0
                BaseX ← concat(substr(Encoding, mod(Base10, Base), 1), BaseX)
            break
        BaseX ← concat(substr(Encoding, mod(Base10, Base), 1), BaseX)
        Base10 ← floor(Base10/Base)
    return BaseX
ToBase10(BaseX, Encoding) :=
    if not IsString(BaseX)
        BaseX ← num2str(BaseX)
    Base ← strlen(Encoding)
    i ← 0 .. strlen(BaseX) - 1
    Base10 ← sum(search(Encoding, substr(BaseX, strlen(BaseX) - i - 1, 1), 0)*Base^i, i)
    return num2str(Base10)
BaseEncoding(BaseX, FromEncoding, ToEncoding) :=
    if IsArray(BaseX)
        return vectorize(FromBase10(ToBase10(BaseX, FromEncoding), ToEncoding))
    else
        return FromBase10(ToBase10(BaseX, FromEncoding), ToEncoding)
Base2 := "01"
Base10 := "0123456789"
Base16 := "0123456789ABCDEF"
Base36 := "0123456789ABCDEFGHIJKLMNOPQRSTUVWXYZ"
Binary := Base2
Decimal := Base10
Hexadecimal := Base16
