Unicode(Code) :=
    ErrorMessage ← "Only valid Unicode strings are accepted as input."
    if not IsString(Code)
        return error(ErrorMessage)
    else if strlen(Code) > 4 or strlen(Code) ≤ 0
        return error(ErrorMessage)
    else
        if strlen(Code) < 4
            Padding ← ""
            for i ∈ 1 .. 4 - strlen(Code)
                Padding ← concat(Padding, "0")
            Code ← concat(Padding, Code)
    Code ← [substr(Code, 3, 1); substr(Code, 2, 1); substr(Code, 1, 1); substr(Code, 0, 1)]
    for i ∈ 0 .. 3
        if search("0123456789abcdefABCDEF", Code[i], 0) == -1
            return error(ErrorMessage)
        if search("abcdef", Code[i], 0) ≥ 0
            Code[i] ← vec2str(str2vec(Code[i]) - [32])
    Conversions ← [
        "0", 0;
        "1", 1;
        "2", 2;
        "3", 3;
        "4", 4;
        "5", 5;
        "6", 6;
        "7", 7;
        "8", 8;
        "9", 9;
        "A", 10;
        "B", 11;
        "C", 12;
        "D", 13;
        "E", 14;
        "F", 15
    ]
    for i ∈ 0 .. 3
        Code[i] ← vlookup(Code[i], Conversions, 1)[0]
    i ← 0 .. 3
    Code ← sum(Code[i]*16^i, i)
    try
        return vec2str([Code])
    on error
        return error(ErrorMessage)
Concatenate(Arguments) :=
    String ← ""
    for i ∈ 0 .. rows(Arguments) - 1
        for j ∈ 0 .. cols(Arguments) - 1
            String ← concat(String, Arguments[i, j])
    return String
ParseError_JSON(JSON, Index, Error) :=
    StartIndex ← Index - 20
    StopIndex ← Index + 20
    if StartIndex < 0
        StartIndex ← 0
    if StopIndex ≥ rows(JSON)
        StopIndex ← rows(JSON) - 1
    Error ← Concatenate([
        "Parse error at index ";
        num2str(Index);
        vec2str([58; 32]);
        Error;
        vec2str([13; 10]);
        vec2str(submatrix(JSON, StartIndex, StopIndex, 0, 0));
        vec2str([13; 10])
    ])
    Spaces ← ""
    if Index > StartIndex
        for i ∈ 0 .. Index - StartIndex
            Spaces ← concat(Spaces, vec2str([32]))
    Error ← concat(Error, Spaces, vec2str([94]))
    return Error
SkipSpaces_JSON(JSON, Index) :=
    while Index ≥ 0 and Index < rows(JSON) and JSON[Index] == 32
        Index ← Index + 1
    return Index
ParseString_JSON(JSON, Index) :=
    Index ← SkipSpaces_JSON(JSON, Index)
    Quote ← vec2str([JSON[Index]])
    Index ← Index + 1
    String ← ""
    while Index ≥ 0 and Index < rows(JSON)
        Char ← vec2str([JSON[Index]])
        if Char == "\"
            Index ← Index + 1
            Char ← vec2str([JSON[Index]])
            if Char == """ or Char == "'" or Char == "\" or Char == "\\"
                String ← concat(String, Char)
            else if Char == "u"
                Code ← vec2str(submatrix(JSON, Index + 1, Index + 4, 0, 0))
                String ← concat(String, Unicode(Code))
                Index ← Index + 4
            else
                EscapedChars ← ["b", [8]; "f", [12]; "n", [13; 10]; "r", [13]; "t", [9]]
                String ← concat(String, vec2str(vlookup(Char, EscapedChars, 1)[0]))
            Index ← Index + 1
        else if Char == Quote
            Index ← Index + 1
            break
        else
            String ← concat(String, Char)
            Index ← Index + 1
    return [String; Index]
ParseKey_JSON(JSON, Index) :=
    if JSON[Index] == 34 or JSON[Index] == 39
        [Key; Index] ← ParseString_JSON(JSON, Index)
    else
        Error ← "Expecting '"' or '''"
        return error(ParseError_JSON(JSON, Index, Error))
    Index ← SkipSpaces_JSON(JSON, Index)
    if JSON[Index] == 58
        Index ← Index + 1
    else
        Error ← "Expecting ':'"
        return error(ParseError_JSON(JSON, Index, Error))
    return [Key; Index]
ParseNumber_JSON(JSON, Index) :=
    Index ← SkipSpaces_JSON(JSON, Index)
    Number ← ""
    while Index ≥ 0 and Index < rows(JSON)
        Char ← vec2str([JSON[Index]])
        if search("+-0123456789.eE", Char, 0) ≥ 0
            Number ← concat(Number, Char)
            Index ← Index + 1
        else
            break
    Number ← str2num(Number)
    return [Number; Index]
ParseLiteral_JSON(JSON, Index) :=
    if vec2str(submatrix(JSON, Index, Index + 3, 0, 0)) == "true"
        Literal ← 1
        Index ← Index + 4
    else if vec2str(submatrix(JSON, Index, Index + 4, 0, 0)) == "false"
        Literal ← 0
        Index ← Index + 5
    else if vec2str(submatrix(JSON, Index, Index + 3, 0, 0)) == "null"
        Literal ← NaN
        Index ← Index + 4
    else
        Error ← "Expecting 'true', 'false', or 'null'"
        return error(ParseError_JSON(JSON, Index, Error))
    return [Literal; Index]
ParsePrimitive_JSON(JSON, Index) :=
    if JSON[Index] == 34 or JSON[Index] == 39
        return ParseString_JSON(JSON, Index)
    else if search("-0123456789", vec2str([JSON[Index]]), 0) ≥ 0
        return ParseNumber_JSON(JSON, Index)
    else if search("tfn", vec2str([JSON[Index]]), 0) ≥ 0
        return ParseLiteral_JSON(JSON, Index)
    else
        Error ← "Expecting string, number, 'true', 'false', 'null', '{', or '['"
        return error(ParseError_JSON(JSON, Index, Error))
ParseValue_JSON(JSON, Index) :=
    Index ← SkipSpaces_JSON(JSON, Index)
    if JSON[Index] == 123
        Object ← [NaN, NaN]
        Index ← Index + 1
        while 1
            Index ← SkipSpaces_JSON(JSON, Index)
            if JSON[Index] == 125
                Index ← Index + 1
                break
            else if JSON[Index] == 44
                Index ← Index + 1
                continue
            else
                [Key; Index] ← ParseKey_JSON(JSON, Index)
                [Value; Index] ← ParseValue_JSON(JSON, Index)
                Object ←
                    if IsNaN(Object[0, 0]) and IsNaN(Object[0, 1])
                        [Key, Value]
                    else
                        stack(Object, [Key, Value])
        return [Object; Index]
    else if JSON[Index] == 91
        Array ← [NaN]
        Index ← Index + 1
        while 1
            Index ← SkipSpaces_JSON(JSON, Index)
            if JSON[Index] == 93
                Index ← Index + 1
                break
            else if JSON[Index] == 44
                Index ← Index + 1
                continue
            else
                [Value; Index] ← ParseValue_JSON(JSON, Index)
                Array ←
                    if IsNaN(Array[0])
                        [Value]
                    else
                        stack(Array, [Value])
        return [Array; Index]
    else
        return ParsePrimitive_JSON(JSON, Index)
Parse_JSON(JSON) :=
    if IsString(JSON)
        JSON ← str2vec(JSON)
    InvalidChars ← [9; 10; 13]
    CleanJSON ← [0]
    for Index ∈ 0 .. last(JSON)
        try
            match(JSON[Index], InvalidChars)
        on error
            CleanJSON ← stack(CleanJSON, JSON[Index])
    JSON ← submatrix(CleanJSON, 1, last(CleanJSON), 0, 0)
    Index ← 0
    Index ← SkipSpaces_JSON(JSON, Index)
    if JSON[Index] == 123 or JSON[Index] == 91
        [Value; Index] ← ParseValue_JSON(JSON, Index)
        return Value
    else
        Error ← "Expecting '{' or '['"
        return error(ParseError_JSON(JSON, Index, Error))
GetValue_JSON(Arguments) :=
    ErrorMessage ← "This function takes a single vector with the values Matrix and Path."
    if not IsArray(Arguments)
        return error(ErrorMessage)
    if rows(Arguments) == 2
        [Matrix; Path] ← Arguments
        ReturnPath ← "none"
    else if rows(Arguments) == 3
        [Matrix; Path; ReturnPath] ← Arguments
    else
        return error(ErrorMessage)
    [Value; SearchPath; Dot; Open; Close; Indices] ← [Matrix; Path; "."; "("; ")"; [0, 0]]
    while 1
        DotPosition ← search(SearchPath, Dot, 0)
        if DotPosition == -1
            Key ← SearchPath
        else
            Key ← substr(SearchPath, 0, DotPosition)
        OpenPosition ← search(Key, Open, 0)
        if OpenPosition == -1
            Indices ← stack(Indices, [match(Key, Value)[0][0], 1])
            Value ← vlookup(Key, Value, 1)[0]
        else
            ClosePosition ← search(Key, Close, 0)
            Index ← str2num(substr(Key, OpenPosition + 1, ClosePosition - OpenPosition - 1))
            Key ← substr(Key, 0, OpenPosition)
            Indices ← stack(Indices, [match(Key, Value)[0][0], 1])
            Indices ← stack(Indices, [Index, 0])
            Value ← vlookup(Key, Value, 1)[0][Index]
        if DotPosition == -1
            break
        else
            SearchPath ← substr(SearchPath, DotPosition + 1, strlen(SearchPath))
    Indices ← submatrix(Indices, 1, rows(Indices) - 1, 0, cols(Indices) - 1)
    if ReturnPath == "path"
        return [Value; Path]
    else if ReturnPath == "indices"
        return [Value; Indices]
    else
        return Value
SetValue_JSON(Arguments) :=
    ErrorMessage ← "This function takes a single vector with the values Matrix, Path, and NewValue."
    if not IsArray(Arguments)
        return error(ErrorMessage)
    if rows(Arguments) == 4
        [Matrix; Path; NewValue; Row] ← Arguments
    else if rows(Arguments) == 3
        [Matrix; Path; NewValue] ← Arguments
        Row ← 0
    else
        return error(ErrorMessage)
    ErrorMessage ← "Path must be a string or list of indices."
    if IsString(Path)
        Indices ← GetValue_JSON([Matrix; Path; "indices"])[1]
    else if IsArray(Path)
        Indices ← Path
    else
        return error(ErrorMessage)
    Value ← Matrix[Indices[Row, 0], Indices[Row, 1]]
    Matrix[Indices[Row, 0], Indices[Row, 1]] ←
        if Row == rows(Indices) - 1
            NewValue
        else
            SetValue_JSON([Value; Indices; NewValue; Row + 1])
    return Matrix
